// SBML level 2 version 3

model GPGeneratedModel()

  // Species:
  substanceOnly species Raf1Star in compartment = 0.025;
  substanceOnly species RKIP in compartment = 0.025;
  substanceOnly species Raf1Star|RKIP in compartment = 0;
  substanceOnly species ERKPP in compartment = 0;
  substanceOnly species Raf1Star|RKIP|ERKPP in compartment = 0;
  substanceOnly species ERK in compartment = 0.025;
  substanceOnly species RKIPP in compartment = 0;
  substanceOnly species MEKPP in compartment = 0.025;
  substanceOnly species MEKPP|ERK in compartment = 0;
  substanceOnly species RP in compartment = 0.03;
  substanceOnly species RP|RKIPP in compartment = 0;
  substanceOnly species RKIPP|RKIP in compartment = 0;
  substanceOnly species ERK|RKIP in compartment = 0;
  substanceOnly species RP|RP|RKIPP in compartment = 0;
  substanceOnly species MEKPP|Raf1Star|RKIP in compartment = 0;
  substanceOnly species ERK|MEKPP in compartment = 0;
  substanceOnly species RP|RKIPP|RKIPP in compartment = 0;
  substanceOnly species RP|RKIP in compartment = 0;
  substanceOnly species Raf1Star|RKIP|ERK in compartment = 0;
  substanceOnly species ERK|Raf1Star in compartment = 0;
  substanceOnly species RKIP|ERK in compartment = 0;
  substanceOnly species ERK|RP in compartment = 0;
  substanceOnly species RKIPP|RP|RKIPP in compartment = 0;
  substanceOnly species RKIPP|Raf1Star in compartment = 0;
  substanceOnly species MEKPP|RKIPP in compartment = 0;
  substanceOnly species ERK|RKIPP in compartment = 0;
  substanceOnly species RKIP|ERKPP in compartment = 0;
  substanceOnly species RKIP|MEKPP in compartment = 0;
  substanceOnly species Raf1Star|MEKPP|ERK in compartment = 0;
  substanceOnly species RP|RKIPP|Raf1Star|RKIP in compartment = 0;
  substanceOnly species ERKPP|RP in compartment = 0;
  substanceOnly species MEKPP|ERK|Raf1Star in compartment = 0;
  substanceOnly species Raf1Star|RKIP|ERKPP|MEKPP in compartment = 0;
  substanceOnly species RKIPP|MEKPP|ERK in compartment = 0;
  substanceOnly species Raf1Star|RKIP|ERKPP|MEKPP|ERK in compartment = 0;
  substanceOnly species Raf1Star|RKIP|ERKPP|ERK in compartment = 0;
  substanceOnly species Raf1Star|ERK in compartment = 0;
  substanceOnly species ERK|Raf1Star|RKIP in compartment = 0;
  substanceOnly species RP|RKIPP|Raf1Star in compartment = 0;
  substanceOnly species RKIP|RP|RKIPP in compartment = 0;
  substanceOnly species Raf1Star|RKIP|ERKPP|Raf1Star|RKIP in compartment = 0;
  substanceOnly species ERK|RP|RKIPP in compartment = 0;
  substanceOnly species Raf1Star|RKIP|ERKPP|RP in compartment = 0;
  substanceOnly species MEKPP|ERK|MEKPP in compartment = 0;
  substanceOnly species MEKPP|ERKPP in compartment = 0;
  substanceOnly species RP|RKIPP|ERKPP in compartment = 0;
  substanceOnly species MEKPP|ERK|Raf1Star|RKIP in compartment = 0;
  substanceOnly species Raf1Star|Raf1Star|RKIP in compartment = 0;
  substanceOnly species ERKPP|RKIPP in compartment = 0;
  substanceOnly species RP|ERK in compartment = 0;
  substanceOnly species RKIP|RKIPP in compartment = 0;
  substanceOnly species ERK|ERKPP in compartment = 0;
  substanceOnly species RP|RKIPP|MEKPP in compartment = 0;
  substanceOnly species ERKPP|MEKPP|ERK in compartment = 0;
  substanceOnly species RP|RKIPP|RKIP in compartment = 0;
  substanceOnly species RP|RKIPP|Raf1Star|RKIP|ERKPP in compartment = 0;
  substanceOnly species RKIP|MEKPP|ERK in compartment = 0;
  substanceOnly species RKIP|Raf1Star in compartment = 0;
  substanceOnly species Raf1Star|RKIP|RP|RKIPP in compartment = 0;
  substanceOnly species Raf1Star|RKIP|RKIPP in compartment = 0;
  substanceOnly species RKIP|Raf1Star|RKIP|ERKPP in compartment = 0;
  substanceOnly species ERK|Raf1Star|RKIP|ERKPP in compartment = 0;
  substanceOnly species Raf1Star|ERKPP in compartment = 0;
  substanceOnly species Raf1Star|RP in compartment = 0;
  substanceOnly species MEKPP|Raf1Star|RKIP|ERKPP in compartment = 0;
  substanceOnly species Raf1Star|RKIP|RP in compartment = 0;
  substanceOnly species ERKPP|Raf1Star in compartment = 0;
  substanceOnly species Raf1Star|RKIP|MEKPP|ERK in compartment = 0;
  substanceOnly species RP|RKIPP|ERK in compartment = 0;
  substanceOnly species ERKPP|Raf1Star|RKIP in compartment = 0;
  substanceOnly species RP|RKIPP|RP in compartment = 0;
  substanceOnly species RP|Raf1Star|RKIP|ERKPP in compartment = 0;
  substanceOnly species ERKPP|RKIP in compartment = 0;
  substanceOnly species ERKPP|ERK in compartment = 0;
  substanceOnly species RP|ERKPP in compartment = 0;
  substanceOnly species Raf1Star|RKIP|ERKPP|RKIP in compartment = 0;
  substanceOnly species RKIPP|Raf1Star|RKIP|ERKPP in compartment = 0;
  substanceOnly species RP|MEKPP in compartment = 0;
  substanceOnly species MEKPP|ERK|RP|RKIPP in compartment = 0;
  substanceOnly species Raf1Star|RKIP|ERKPP|Raf1Star in compartment = 0;
  substanceOnly species RP|RKIPP|MEKPP|ERK in compartment = 0;
  substanceOnly species MEKPP|ERK|RKIP in compartment = 0;
  substanceOnly species MEKPP|RKIP in compartment = 0;
  substanceOnly species RKIPP|ERK in compartment = 0;
  substanceOnly species Raf1Star|RKIP|ERKPP|ERKPP in compartment = 0;
  substanceOnly species MEKPP|MEKPP|ERK in compartment = 0;
  substanceOnly species Raf1Star|RKIP|MEKPP in compartment = 0;
  substanceOnly species ERKPP|Raf1Star|RKIP|ERKPP in compartment = 0;
  substanceOnly species RP|Raf1Star|RKIP in compartment = 0;
  substanceOnly species Raf1Star|Raf1Star|RKIP|ERKPP in compartment = 0;
  substanceOnly species MEKPP|RP in compartment = 0;
  substanceOnly species Raf1Star|RP|RKIPP in compartment = 0;
  substanceOnly species Raf1Star|RKIP|Raf1Star in compartment = 0;
  substanceOnly species ERKPP|MEKPP in compartment = 0;
  substanceOnly species Raf1Star|RKIP|ERKPP|RKIPP in compartment = 0;
  substanceOnly species MEKPP|ERK|ERK in compartment = 0;
  substanceOnly species RKIPP|ERKPP in compartment = 0;
  substanceOnly species RKIP|RP in compartment = 0;
  substanceOnly species MEKPP|Raf1Star in compartment = 0;
  substanceOnly species ERKPP|RP|RKIPP in compartment = 0;
  substanceOnly species RKIP|Raf1Star|RKIP in compartment = 0;
  substanceOnly species Raf1Star|RKIP|RKIP in compartment = 0;
  substanceOnly species MEKPP|ERK|ERKPP in compartment = 0;
  substanceOnly species RKIPP|RP in compartment = 0;
  substanceOnly species ERK|MEKPP|ERK in compartment = 0;
  substanceOnly species Raf1Star|RKIP|ERKPP|RP|RKIPP in compartment = 0;
  substanceOnly species MEKPP|RP|RKIPP in compartment = 0;
  substanceOnly species MEKPP|ERK|RKIPP in compartment = 0;
  substanceOnly species Raf1Star|MEKPP in compartment = 0;
  substanceOnly species RKIPP|Raf1Star|RKIP in compartment = 0;
  substanceOnly species RP|MEKPP|ERK in compartment = 0;
  substanceOnly species Raf1Star|RKIPP in compartment = 0;
  substanceOnly species MEKPP|ERK|RP in compartment = 0;
  substanceOnly species RP|Raf1Star in compartment = 0;
  substanceOnly species MEKPP|ERK|Raf1Star|RKIP|ERKPP in compartment = 0;
  substanceOnly species RKIPP|MEKPP in compartment = 0;
  substanceOnly species Raf1Star|RKIP|Raf1Star|RKIP|ERKPP in compartment = 0;

  // Parameters:
  k0 = 0.7736663;
  k1 = 0.1059797;
  k2 = 0.03588466;
  k3 = 0.5961818;
  k4 = 0.278719;
  k5 = 0.3785652;
  k6 = 0.9969442;
  k7 = 0.1554336;
  k8 = 0.7395198;
  k9 = 0.562038;
  k10 = 0.5654328;
  k11 = 0.3378736;
  k12 = 0.6919007;
  k13 = 0.850042;
  k14 = 0.6345154;
  k15 = 0.3253796;
  k16 = 0.3983748;
  k17 = 0.07404789;
  k18 = 0.5761953;
  k19 = 0.9761087;
  k20 = 0.7038532;
  k21 = 0.2833057;
  k22 = 0.5676101;
  k23 = 0.4475824;
  k24 = 0.4885373;
  k25 = 0.3963206;
  k26 = 0.8321127;
  k27 = 0.563478;
  k28 = 0.4951432;
  k29 = 0.9606528;
  k30 = 0.9724234;
  k31 = 0.6210045;
  k32 = 0.8877932;
  k33 = 0.5721658;
  k34 = 0.7423329;
  k35 = 0.4360784;
  k36 = 0.0330138;
  k37 = 0.01004216;
  k38 = 0.7526853;
  k39 = 0.453567;
  k40 = 0.3999957;
  k41 = 0.4872778;
  k42 = 0.7751876;
  k43 = 0.5323281;
  k44 = 0.01581347;
  k45 = 0.4213139;
  k46 = 0.6699787;
  k47 = 0.2513978;
  k48 = 0.9186153;
  k49 = 0.7363965;
  k50 = 0.05706004;
  k51 = 0.2504365;
  k52 = 0.4042202;
  k53 = 0.9557267;
  k54 = 0.8283484;
  k55 = 0.7699122;
  k56 = 0.5415596;
  k57 = 0.7147344;
  k58 = 0.8634647;
  k59 = 0.09730609;
  k60 = 0.6222082;
  k61 = 0.07674203;
  k62 = 0.8292699;
  k63 = 0.09640101;
  k64 = 0.3334874;
  k65 = 0.8696884;
  k66 = 0.1032891;
  k67 = 0.7460203;
  k68 = 0.06703117;
  k69 = 0.1295564;
  k70 = 0.2369839;
  k71 = 0.7535071;
  k72 = 0.4140969;
  k73 = 0.2861171;
  k74 = 0.784257;
  k75 = 0.2045668;
  k76 = 0.1932444;
  k77 = 0.7449249;
  k78 = 0.3343322;
  k79 = 0.948909;
  k80 = 0.9721092;
  k81 = 0.3251365;
  k82 = 0.8877251;
  k83 = 0.4664618;
  k84 = 0.9664637;
  k85 = 0.0477218;
  k86 = 0.07446589;
  k87 = 0.9420605;
  k88 = 0.07736322;
  k89 = 0.9986363;
  k90 = 0.2864926;
  k91 = 0.7389693;
  k92 = 0.8647911;
  k93 = 0.3346507;
  k94 = 0.775607;
  k95 = 0.8341148;
  k96 = 0.2761734;
  k97 = 0.5474204;
  k98 = 0.6809582;
  k99 = 0.4722001;
  k100 = 0.3683039;
  k101 = 0.005002476;
  k102 = 0.9899273;
  k103 = 0.3617948;
  k104 = 0.2627118;
  k105 = 0.1482418;
  k106 = 0.4406944;
  k107 = 0.5637777;
  k108 = 0.3512521;
  k109 = 0.6432756;
  k110 = 0.1390518;
  k111 = 0.8666585;
  k112 = 0.6801622;
  k113 = 0.5215164;
  k114 = 0.5067312;
  k115 = 0.7658255;
  k116 = 0.393991;
  k117 = 0.07509068;
  k118 = 0.2681821;
  k119 = 0.8229995;
  k120 = 0.3879574;
  k121 = 0.67523;
  k122 = 0.8314608;
  k123 = 0.1489513;
  k124 = 0.9955937;
  k125 = 0.9168196;
  k126 = 0.673008;
  k127 = 0.4482227;
  k128 = 0.5660728;
  k129 = 0.4757758;
  k130 = 0.6447968;
  k131 = 0.08617133;
  k132 = 0.3615051;
  k133 = 0.6594229;
  k134 = 0.1175431;
  k135 = 0.6428806;
  k136 = 0.9705272;
  k137 = 0.7734512;
  k138 = 0.8269358;
  k139 = 0.8748495;
  k140 = 0.9214835;
  k141 = 0.6892856;
  k142 = 0.05627586;
  k143 = 0.4667951;
  k144 = 0.9078802;
  k145 = 0.9544878;
  k146 = 0.5714474;
  k147 = 0.807456;
  k148 = 0.6176038;
  k149 = 0.4536408;
  k150 = 0.1020798;
  k151 = 0.8642561;
  k152 = 0.2478153;
  k153 = 0.01100297;
  k154 = 0.4481264;
  k155 = 0.6496487;
  k156 = 0.6862042;
  k157 = 0.2259707;
  k158 = 0.4993892;
  k159 = 0.8148937;
  k160 = 0.09706978;
  k161 = 0.7565767;
  k162 = 0.8800212;
  k163 = 0.5055244;
  k164 = 0.20053;
  k165 = 0.5310049;
  k166 = 0.6848605;
  k167 = 0.003518122;
  k168 = 0.8246469;
  k169 = 0.1130277;
  k170 = 0.6021831;
  k171 = 0.9269184;
  k172 = 0.2656131;
  k173 = 0.04065342;
  k174 = 0.4911049;
  k175 = 0.5554404;
  k176 = 0.8069604;
  k177 = 0.9936465;
  k178 = 0.3407518;
  k179 = 0.3983093;
  k180 = 0.001449095;
  k181 = 0.6262829;
  k182 = 0.6192198;
  k183 = 0.6389107;
  k184 = 0.1907684;
  k185 = 0.6978831;
  k186 = 0.7490877;
  k187 = 0.05015054;
  k188 = 0.0403559;
  k189 = 0.5977319;
  k190 = 0.5492225;
  k191 = 0.2766463;
  k192 = 0.6656879;
  k193 = 0.2728779;
  k194 = 0.2112495;
  k195 = 0.8664155;
  k196 = 0.05566871;
  k197 = 0.9025927;
  k198 = 0.2868569;
  k199 = 0.1677052;
  k200 = 0.3969204;
  k201 = 0.1229087;
  k202 = 0.2953928;
  k203 = 0.1247917;
  k204 = 0.6491985;
  k205 = 0.954594;
  k206 = 0.1885739;
  k207 = 0.7156104;
  k208 = 0.9625733;
  k209 = 0.3058573;
  k210 = 0.6486967;
  k211 = 0.8162355;
  k212 = 0.4989954;
  k213 = 0.7982562;
  k214 = 0.1759862;
  k215 = 0.7575546;
  k216 = 0.4698762;
  k217 = 0.2459004;
  k218 = 0.06209548;
  k219 = 0.5433068;
  k220 = 0.8185518;
  k221 = 0.1699528;
  k222 = 0.2786007;
  k223 = 0.8187823;
  k224 = 0.03933352;
  k225 = 0.9468509;
  k226 = 0.06385492;
  k227 = 0.2670789;
  k228 = 0.5264631;
  k229 = 0.475154;
  k230 = 0.6532543;
  k231 = 0.356244;
  k232 = 0.7831415;
  k233 = 0.9037577;
  k234 = 0.1863317;
  k235 = 0.8579288;
  k236 = 0.2765501;
  k237 = 0.3066694;
  k238 = 0.9697116;
  k239 = 0.04359256;
  k240 = 0.3397654;
  k241 = 0.906019;
  k242 = 0.124868;
  k243 = 0.3724587;
  k244 = 0.4233871;
  k245 = 0.06439957;
  k246 = 0.6187679;
  k247 = 0.8958991;
  k248 = 0.2602395;
  k249 = 0.7831551;
  k250 = 0.06146018;
  k251 = 0.5555083;
  k252 = 0.8222528;
  k253 = 0.8074559;
  k254 = 0.5063839;
  k255 = 0.3263661;
  k256 = 0.04627681;
  k257 = 0.9425485;
  k258 = 0.3314657;
  k259 = 0.5818711;
  k260 = 0.5647025;
  k261 = 0.9142879;
  k262 = 0.3714734;
  k263 = 0.5188786;
  k264 = 0.3246573;
  k265 = 0.8760228;
  k266 = 0.02844761;
  k267 = 0.2041656;
  k268 = 0.7042795;
  k269 = 0.3178659;
  k270 = 0.4612342;
  k271 = 0.5170123;
  k272 = 0.5456104;
  k273 = 0.1749847;
  k274 = 0.3242246;
  k275 = 0.4323131;
  k276 = 0.1090198;
  k277 = 0.9470993;
  k278 = 0.3802478;
  k279 = 0.03305956;
  k280 = 0.4589652;
  k281 = 0.075759;
  k282 = 0.8824438;
  k283 = 0.03395154;
  k284 = 0.7124016;
  k285 = 0.4785343;
  k286 = 0.08446317;
  k287 = 0.5636649;
  k288 = 0.1096151;
  k289 = 0.3830932;
  k290 = 0.2063077;
  k291 = 0.9007142;
  k292 = 0.7059921;
  k293 = 0.2298563;
  k294 = 0.9121771;
  k295 = 0.4278739;
  k296 = 0.6572605;
  k297 = 0.3876811;
  k298 = 0.8149808;
  k299 = 0.03133724;
  k300 = 0.7788935;
  k301 = 0.1889193;
  k302 = 0.4705713;
  k303 = 0.5982994;
  k304 = 0.4708231;
  k305 = 0.2768713;
  k306 = 0.8254909;
  k307 = 0.7593644;
  k308 = 0.7535765;
  k309 = 0.6499569;
  k310 = 0.03170782;
  k311 = 0.9145395;
  k312 = 0.2924092;
  k313 = 0.8052836;
  k314 = 0.9161217;
  k315 = 0.1452429;
  k316 = 0.7010959;
  k317 = 0.3384336;
  k318 = 0.2864936;
  k319 = 0.935106;
  k320 = 0.5079549;
  k321 = 0.9163852;
  k322 = 0.2092445;
  k323 = 0.7221456;
  k324 = 0.6949495;
  k325 = 0.7876845;
  k326 = 0.3024012;
  k327 = 0.7447848;
  k328 = 0.3445067;
  k329 = 0.9859719;
  k330 = 0.8448439;
  k331 = 0.3323091;
  k332 = 0.8744055;
  k333 = 0.4454095;
  k334 = 0.1768486;
  k335 = 0.6860225;
  k336 = 0.4543057;
  k337 = 0.9819495;
  k338 = 0.79415;
  k339 = 0.4424539;
  k340 = 0.2136043;
  k341 = 0.4744756;
  k342 = 0.4539619;
  k343 = 0.02313981;
  k344 = 0.5859471;
  k345 = 0.2096828;
  k346 = 0.3008787;
  k347 = 0.01967234;
  k348 = 0.05888759;
  k349 = 0.2532987;
  k350 = 0.9214609;
  k351 = 0.1870444;
  k352 = 0.9401052;
  k353 = 0.2874229;
  k354 = 0.6754585;
  k355 = 0.5863848;
  k356 = 0.7691002;
  k357 = 0.006929172;
  k358 = 0.6113399;
  k359 = 0.5180289;
  k360 = 0.01019965;
  k361 = 0.4040917;
  k362 = 0.586591;
  k363 = 0.1985293;
  k364 = 0.2695708;
  k365 = 0.8092895;
  k366 = 0.9043146;
  k367 = 0.2275554;
  k368 = 0.4061384;
  k369 = 0.268618;
  k370 = 0.2071229;
  k371 = 0.1588705;
  k372 = 0.5337842;
  k373 = 0.5804746;
  k374 = 0.1095279;
  k375 = 0.7870811;
  k376 = 0.9698988;
  k377 = 0.8690663;
  k378 = 0.2738747;
  k379 = 0.7369699;
  k380 = 0.6008985;
  k381 = 0.6914263;
  k382 = 0.979716;
  k383 = 0.1219087;
  k384 = 0.1746512;
  k385 = 0.3367683;
  k386 = 0.7370471;
  k387 = 0.7860607;
  k388 = 0.5488378;

  // Reactions:
  r0: ERK|Raf1Star => Raf1Star|RKIP|Raf1Star; k0*ERK|Raf1Star;
  r1: MEKPP|Raf1Star => Raf1Star|RKIP|ERKPP|Raf1Star; k1*MEKPP|Raf1Star;
  r2: Raf1Star|RKIP|MEKPP => ERKPP|MEKPP; k2*Raf1Star|RKIP|MEKPP;
  r3: ERK|Raf1Star => RP|Raf1Star; k3*ERK|Raf1Star;
  r4: Raf1Star|RKIP|ERKPP|MEKPP|ERK => RP|MEKPP|ERK; k4*Raf1Star|RKIP|ERKPP|MEKPP|ERK;
  r5: MEKPP|ERK + Raf1Star|RKIP => MEKPP|ERK|Raf1Star|RKIP; k5*MEKPP|ERK*Raf1Star|RKIP;
  r6: RP|RKIPP|Raf1Star => RKIP|Raf1Star; k6*RP|RKIPP|Raf1Star;
  r7: ERKPP|Raf1Star => Raf1Star|RKIP|Raf1Star; k7*ERKPP|Raf1Star;
  r8: MEKPP|ERK|Raf1Star|RKIP|ERKPP => Raf1Star|RKIP|Raf1Star|RKIP|ERKPP; k8*MEKPP|ERK|Raf1Star|RKIP|ERKPP;
  r9: Raf1Star|RKIP|Raf1Star|RKIP|ERKPP => RP|Raf1Star|RKIP|ERKPP; k9*Raf1Star|RKIP|Raf1Star|RKIP|ERKPP;
  r10: ERKPP|RP => RP|RKIPP|RP; k10*ERKPP|RP;
  r11: RKIPP|MEKPP => Raf1Star|MEKPP; k11*RKIPP|MEKPP;
  r12: RKIPP|RKIP => RP|RKIP; k12*RKIPP|RKIP;
  r13: Raf1Star|RKIP|ERKPP|RP|RKIPP => ERK|RP|RKIPP; k13*Raf1Star|RKIP|ERKPP|RP|RKIPP;
  r14: Raf1Star + RKIP => Raf1Star|RKIP; k14*Raf1Star*RKIP;
  r15: RKIP|MEKPP => RKIPP|MEKPP; k15*RKIP|MEKPP;
  r16: Raf1Star|RKIP|ERKPP|RP => Raf1Star|RKIP|ERKPP + RP; k16*Raf1Star|RKIP|ERKPP|RP;
  r17: Raf1Star|RKIP|ERKPP|RP => MEKPP|ERK|RP; k17*Raf1Star|RKIP|ERKPP|RP;
  r18: Raf1Star|Raf1Star|RKIP => MEKPP|ERK|Raf1Star|RKIP; k18*Raf1Star|Raf1Star|RKIP;
  r19: Raf1Star|RKIP|RP|RKIPP => RKIP|RP|RKIPP; k19*Raf1Star|RKIP|RP|RKIPP;
  r20: Raf1Star|RKIP|Raf1Star => RKIPP|Raf1Star; k20*Raf1Star|RKIP|Raf1Star;
  r21: RKIPP|RP => MEKPP|ERK|RP; k21*RKIPP|RP;
  r22: RP|RKIPP => Raf1Star|RKIP|RKIPP; k22*RP|RKIPP;
  r23: Raf1Star|MEKPP => RKIPP|MEKPP; k23*Raf1Star|MEKPP;
  r24: RKIP|Raf1Star|RKIP|ERKPP => RP|RKIPP|Raf1Star|RKIP|ERKPP; k24*RKIP|Raf1Star|RKIP|ERKPP;
  r25: RP|RP|RKIPP => ERK|RP|RKIPP; k25*RP|RP|RKIPP;
  r26: Raf1Star|RKIP|RKIP => RKIPP|RKIP; k26*Raf1Star|RKIP|RKIP;
  r27: RKIP|RKIPP => ERK|RKIPP; k27*RKIP|RKIPP;
  r28: ERKPP|MEKPP => RP|MEKPP; k28*ERKPP|MEKPP;
  r29: Raf1Star|ERK => RP|RKIPP|ERK; k29*Raf1Star|ERK;
  r30: MEKPP + Raf1Star => MEKPP|Raf1Star; k30*MEKPP*Raf1Star;
  r31: Raf1Star|Raf1Star|RKIP => RKIPP|Raf1Star|RKIP; k31*Raf1Star|Raf1Star|RKIP;
  r32: Raf1Star|MEKPP => MEKPP|ERK|MEKPP; k32*Raf1Star|MEKPP;
  r33: MEKPP|RP|RKIPP => RKIPP|RP|RKIPP; k33*MEKPP|RP|RKIPP;
  r34: RKIP|ERK => RP|RKIPP|ERK; k34*RKIP|ERK;
  r35: Raf1Star|ERK => RP|ERK; k35*Raf1Star|ERK;
  r36: Raf1Star|RKIP|RP|RKIPP => Raf1Star|RKIP|ERKPP|RP|RKIPP; k36*Raf1Star|RKIP|RP|RKIPP;
  r37: RP|Raf1Star|RKIP|ERKPP => RP + Raf1Star|RKIP|ERKPP; k37*RP|Raf1Star|RKIP|ERKPP;
  r38: Raf1Star|RKIP|ERKPP + ERKPP => Raf1Star|RKIP|ERKPP|ERKPP; k38*Raf1Star|RKIP|ERKPP*ERKPP;
  r39: ERK|MEKPP|ERK => MEKPP|MEKPP|ERK; k39*ERK|MEKPP|ERK;
  r40: Raf1Star|RP => ERKPP|RP; k40*Raf1Star|RP;
  r41: Raf1Star|Raf1Star|RKIP|ERKPP => RP|Raf1Star|RKIP|ERKPP; k41*Raf1Star|Raf1Star|RKIP|ERKPP;
  r42: ERK|Raf1Star => RP|RKIPP|Raf1Star; k42*ERK|Raf1Star;
  r43: RP|RKIP => Raf1Star|RKIP|RKIP; k43*RP|RKIP;
  r44: MEKPP|ERK|Raf1Star|RKIP|ERKPP => RP|RKIPP|Raf1Star|RKIP|ERKPP; k44*MEKPP|ERK|Raf1Star|RKIP|ERKPP;
  r45: ERK|MEKPP => Raf1Star|RKIP|ERKPP|MEKPP; k45*ERK|MEKPP;
  r46: ERK|Raf1Star|RKIP|ERKPP => RKIPP|Raf1Star|RKIP|ERKPP; k46*ERK|Raf1Star|RKIP|ERKPP;
  r47: MEKPP|RKIP => RP|RKIP; k47*MEKPP|RKIP;
  r48: MEKPP|RP|RKIPP => ERKPP|RP|RKIPP; k48*MEKPP|RP|RKIPP;
  r49: MEKPP|ERK|RKIPP => Raf1Star|RKIPP; k49*MEKPP|ERK|RKIPP;
  r50: Raf1Star|RKIP|ERKPP|Raf1Star => Raf1Star|RKIP|Raf1Star; k50*Raf1Star|RKIP|ERKPP|Raf1Star;
  r51: ERK|MEKPP|ERK => Raf1Star|MEKPP|ERK; k51*ERK|MEKPP|ERK;
  r52: RP|ERKPP => Raf1Star|RKIP|ERKPP; k52*RP|ERKPP;
  r53: MEKPP|RP => ERK|RP; k53*MEKPP|RP;
  r54: Raf1Star|Raf1Star|RKIP|ERKPP => ERKPP|Raf1Star|RKIP|ERKPP; k54*Raf1Star|Raf1Star|RKIP|ERKPP;
  r55: MEKPP|ERK => Raf1Star|RKIP|ERK; k55*MEKPP|ERK;
  r56: MEKPP + ERK => MEKPP|ERK; k56*MEKPP*ERK;
  r57: MEKPP|ERK + RP => MEKPP|ERK|RP; k57*MEKPP|ERK*RP;
  r58: MEKPP|ERK|RKIPP => RP|RKIPP; k58*MEKPP|ERK|RKIPP;
  r59: MEKPP|MEKPP|ERK => Raf1Star|RKIP|MEKPP|ERK; k59*MEKPP|MEKPP|ERK;
  r60: Raf1Star|RKIP|RKIP => RP|RKIPP|RKIP; k60*Raf1Star|RKIP|RKIP;
  r61: Raf1Star|RKIP|MEKPP|ERK => Raf1Star|RKIP + MEKPP|ERK; k61*Raf1Star|RKIP|MEKPP|ERK;
  r62: Raf1Star|RKIP|ERKPP|ERK => RP|ERK; k62*Raf1Star|RKIP|ERKPP|ERK;
  r63: ERKPP + Raf1Star|RKIP|ERKPP => ERKPP|Raf1Star|RKIP|ERKPP; k63*ERKPP*Raf1Star|RKIP|ERKPP;
  r64: ERK|MEKPP|ERK => RP|MEKPP|ERK; k64*ERK|MEKPP|ERK;
  r65: RP|MEKPP|ERK => Raf1Star|RKIP|ERKPP|MEKPP|ERK; k65*RP|MEKPP|ERK;
  r66: MEKPP|ERK|RKIP => MEKPP|RKIP; k66*MEKPP|ERK|RKIP;
  r67: RKIPP|ERK => RKIPP + ERK; k67*RKIPP|ERK;
  r68: Raf1Star|MEKPP|ERK => Raf1Star|RKIP|MEKPP|ERK; k68*Raf1Star|MEKPP|ERK;
  r69: ERKPP|RKIP => Raf1Star|RKIP|ERKPP|RKIP; k69*ERKPP|RKIP;
  r70: Raf1Star|RKIP|ERKPP|RP|RKIPP => RKIPP|RP|RKIPP; k70*Raf1Star|RKIP|ERKPP|RP|RKIPP;
  r71: Raf1Star|RKIP|RKIP => MEKPP|ERK|RKIP; k71*Raf1Star|RKIP|RKIP;
  r72: ERKPP|MEKPP|ERK => Raf1Star|MEKPP|ERK; k72*ERKPP|MEKPP|ERK;
  r73: RP|RKIPP|Raf1Star|RKIP|ERKPP => MEKPP|ERK|Raf1Star|RKIP|ERKPP; k73*RP|RKIPP|Raf1Star|RKIP|ERKPP;
  r74: RP|MEKPP|ERK => RP|RKIPP|MEKPP|ERK; k74*RP|MEKPP|ERK;
  r75: MEKPP|ERK|Raf1Star|RKIP => RKIP|Raf1Star|RKIP; k75*MEKPP|ERK|Raf1Star|RKIP;
  r76: RKIP|MEKPP|ERK => MEKPP|MEKPP|ERK; k76*RKIP|MEKPP|ERK;
  r77: MEKPP|RKIP => Raf1Star|RKIP|ERKPP|RKIP; k77*MEKPP|RKIP;
  r78: ERKPP|MEKPP => ERK|MEKPP; k78*ERKPP|MEKPP;
  r79: Raf1Star|RKIP|Raf1Star => RP|Raf1Star; k79*Raf1Star|RKIP|Raf1Star;
  r80: Raf1Star|RKIP|MEKPP|ERK => RKIP|MEKPP|ERK; k80*Raf1Star|RKIP|MEKPP|ERK;
  r81: Raf1Star|RKIP|ERKPP|ERKPP => RP|ERKPP; k81*Raf1Star|RKIP|ERKPP|ERKPP;
  r82: Raf1Star|RKIP|MEKPP|ERK => ERK|MEKPP|ERK; k82*Raf1Star|RKIP|MEKPP|ERK;
  r83: ERKPP|ERK => Raf1Star|RKIP|ERK; k83*ERKPP|ERK;
  r84: RP|RKIPP => RKIP|RKIPP; k84*RP|RKIPP;
  r85: RP + Raf1Star|RKIP|ERKPP => RP|Raf1Star|RKIP|ERKPP; k85*RP*Raf1Star|RKIP|ERKPP;
  r86: ERKPP|RKIP => Raf1Star|RKIP; k86*ERKPP|RKIP;
  r87: RP|RKIPP + Raf1Star|RKIP => RP|RKIPP|Raf1Star|RKIP; k87*RP|RKIPP*Raf1Star|RKIP;
  r88: Raf1Star|RKIP|ERKPP|RP|RKIPP => MEKPP|ERK|RP|RKIPP; k88*Raf1Star|RKIP|ERKPP|RP|RKIPP;
  r89: MEKPP|ERK|MEKPP => Raf1Star|RKIP|MEKPP; k89*MEKPP|ERK|MEKPP;
  r90: Raf1Star|MEKPP => ERKPP|MEKPP; k90*Raf1Star|MEKPP;
  r91: ERK|MEKPP|ERK => RKIP|MEKPP|ERK; k91*ERK|MEKPP|ERK;
  r92: Raf1Star|Raf1Star|RKIP|ERKPP => MEKPP|ERK|Raf1Star|RKIP|ERKPP; k92*Raf1Star|Raf1Star|RKIP|ERKPP;
  r93: RKIPP|MEKPP|ERK => ERK|MEKPP|ERK; k93*RKIPP|MEKPP|ERK;
  r94: RKIPP|MEKPP => RP|MEKPP; k94*RKIPP|MEKPP;
  r95: MEKPP|ERK|ERKPP => RKIPP|ERKPP; k95*MEKPP|ERK|ERKPP;
  r96: RP + RKIPP => RP|RKIPP; k96*RP*RKIPP;
  r97: Raf1Star|RKIP|ERKPP|Raf1Star => RKIP|Raf1Star; k97*Raf1Star|RKIP|ERKPP|Raf1Star;
  r98: Raf1Star|RKIPP => ERKPP|RKIPP; k98*Raf1Star|RKIPP;
  r99: ERKPP|RP|RKIPP => ERK|RP|RKIPP; k99*ERKPP|RP|RKIPP;
  r100: MEKPP|ERK|RKIP => RP|RKIPP|RKIP; k100*MEKPP|ERK|RKIP;
  r101: ERKPP|Raf1Star|RKIP => Raf1Star|Raf1Star|RKIP; k101*ERKPP|Raf1Star|RKIP;
  r102: ERK|Raf1Star|RKIP|ERKPP => ERK + Raf1Star|RKIP|ERKPP; k102*ERK|Raf1Star|RKIP|ERKPP;
  r103: MEKPP|ERK|RKIP => ERKPP|RKIP; k103*MEKPP|ERK|RKIP;
  r104: ERK|Raf1Star => ERK + Raf1Star; k104*ERK|Raf1Star;
  r105: Raf1Star|ERKPP => RKIP|ERKPP; k105*Raf1Star|ERKPP;
  r106: MEKPP|RKIPP => Raf1Star|RKIP|RKIPP; k106*MEKPP|RKIPP;
  r107: Raf1Star|RKIP|ERKPP + MEKPP|ERK => Raf1Star|RKIP|ERKPP|MEKPP|ERK; k107*Raf1Star|RKIP|ERKPP*MEKPP|ERK;
  r108: MEKPP|ERK + RKIP => MEKPP|ERK|RKIP; k108*MEKPP|ERK*RKIP;
  r109: ERKPP + RKIPP => ERKPP|RKIPP; k109*ERKPP*RKIPP;
  r110: Raf1Star|RKIP|MEKPP => RP|MEKPP; k110*Raf1Star|RKIP|MEKPP;
  r111: RKIP|Raf1Star|RKIP|ERKPP => Raf1Star|Raf1Star|RKIP|ERKPP; k111*RKIP|Raf1Star|RKIP|ERKPP;
  r112: MEKPP|ERK|Raf1Star|RKIP|ERKPP => MEKPP|Raf1Star|RKIP|ERKPP; k112*MEKPP|ERK|Raf1Star|RKIP|ERKPP;
  r113: MEKPP|RKIPP => ERKPP|RKIPP; k113*MEKPP|RKIPP;
  r114: ERK + Raf1Star|RKIP|ERKPP => ERK|Raf1Star|RKIP|ERKPP; k114*ERK*Raf1Star|RKIP|ERKPP;
  r115: MEKPP|ERK + Raf1Star|RKIP|ERKPP => MEKPP|ERK|Raf1Star|RKIP|ERKPP; k115*MEKPP|ERK*Raf1Star|RKIP|ERKPP;
  r116: Raf1Star|RKIP|ERKPP|RKIP => RKIPP|RKIP; k116*Raf1Star|RKIP|ERKPP|RKIP;
  r117: ERK|RP|RKIPP => RKIP|RP|RKIPP; k117*ERK|RP|RKIPP;
  r118: RP|RKIPP|Raf1Star => RP|Raf1Star; k118*RP|RKIPP|Raf1Star;
  r119: MEKPP|ERK|RP => RKIPP|RP; k119*MEKPP|ERK|RP;
  r120: ERK|MEKPP|ERK => Raf1Star|RKIP|ERKPP|MEKPP|ERK; k120*ERK|MEKPP|ERK;
  r121: ERKPP|RP => MEKPP|ERK|RP; k121*ERKPP|RP;
  r122: Raf1Star|RKIP|ERKPP|MEKPP|ERK => Raf1Star|RKIP|ERKPP + MEKPP|ERK; k122*Raf1Star|RKIP|ERKPP|MEKPP|ERK;
  r123: MEKPP|RP => MEKPP|ERK|RP; k123*MEKPP|RP;
  r124: MEKPP|ERK|ERK => RKIPP|ERK; k124*MEKPP|ERK|ERK;
  r125: RKIP|Raf1Star => RP|RKIPP|Raf1Star; k125*RKIP|Raf1Star;
  r126: RP|RKIPP|RP => RP|RKIPP + RP; k126*RP|RKIPP|RP;
  r127: ERK|RP => RKIP|RP; k127*ERK|RP;
  r128: ERKPP|MEKPP|ERK => Raf1Star|RKIP|ERKPP|MEKPP|ERK; k128*ERKPP|MEKPP|ERK;
  r129: RP|RKIPP|RKIPP => RP|RKIPP; k129*RP|RKIPP|RKIPP;
  r130: MEKPP + RP => MEKPP|RP; k130*MEKPP*RP;
  r131: Raf1Star|RKIP|ERKPP|MEKPP => RKIPP|MEKPP; k131*Raf1Star|RKIP|ERKPP|MEKPP;
  r132: RKIP|MEKPP|ERK => Raf1Star|MEKPP|ERK; k132*RKIP|MEKPP|ERK;
  r133: RKIPP|ERK => Raf1Star|RKIP|ERK; k133*RKIPP|ERK;
  r134: ERK|RKIP => RKIPP|RKIP; k134*ERK|RKIP;
  r135: ERK|Raf1Star|RKIP|ERKPP => MEKPP|ERK|Raf1Star|RKIP|ERKPP; k135*ERK|Raf1Star|RKIP|ERKPP;
  r136: MEKPP|Raf1Star => Raf1Star|RKIP|Raf1Star; k136*MEKPP|Raf1Star;
  r137: Raf1Star|RKIP|MEKPP|ERK => Raf1Star|RKIP|ERKPP|MEKPP|ERK; k137*Raf1Star|RKIP|MEKPP|ERK;
  r138: RKIPP|Raf1Star => ERKPP|Raf1Star; k138*RKIPP|Raf1Star;
  r139: MEKPP|ERK|ERKPP => Raf1Star|RKIP|ERKPP; k139*MEKPP|ERK|ERKPP;
  r140: ERKPP|MEKPP => MEKPP|ERK|MEKPP; k140*ERKPP|MEKPP;
  r141: ERKPP|RP|RKIPP => Raf1Star|RP|RKIPP; k141*ERKPP|RP|RKIPP;
  r142: ERKPP|RKIP => RP|RKIP; k142*ERKPP|RKIP;
  r143: ERK|MEKPP|ERK => RP|RKIPP|MEKPP|ERK; k143*ERK|MEKPP|ERK;
  r144: RKIPP + RP|RKIPP => RKIPP|RP|RKIPP; k144*RKIPP*RP|RKIPP;
  r145: ERK|RP => Raf1Star|RKIP|ERKPP|RP; k145*ERK|RP;
  r146: MEKPP|ERK|Raf1Star|RKIP|ERKPP => RKIPP|Raf1Star|RKIP|ERKPP; k146*MEKPP|ERK|Raf1Star|RKIP|ERKPP;
  r147: Raf1Star|RKIP|ERKPP|ERK => ERKPP|ERK; k147*Raf1Star|RKIP|ERKPP|ERK;
  r148: Raf1Star + RP|RKIPP => Raf1Star|RP|RKIPP; k148*Raf1Star*RP|RKIPP;
  r149: ERK + RKIPP => ERK|RKIPP; k149*ERK*RKIPP;
  r150: RP|Raf1Star => MEKPP|Raf1Star; k150*RP|Raf1Star;
  r151: Raf1Star|RKIP|Raf1Star => ERKPP|Raf1Star; k151*Raf1Star|RKIP|Raf1Star;
  r152: RP|RKIPP|Raf1Star => Raf1Star|RKIP|ERKPP|Raf1Star; k152*RP|RKIPP|Raf1Star;
  r153: Raf1Star|RKIP|ERKPP|ERK => RKIPP|ERK; k153*Raf1Star|RKIP|ERKPP|ERK;
  r154: MEKPP|RKIP => ERKPP|RKIP; k154*MEKPP|RKIP;
  r155: RP|RKIPP|ERKPP => RP|RKIPP + ERKPP; k155*RP|RKIPP|ERKPP;
  r156: RP|Raf1Star|RKIP|ERKPP => RP|RKIPP|Raf1Star|RKIP|ERKPP; k156*RP|Raf1Star|RKIP|ERKPP;
  r157: Raf1Star|RKIP|RKIP => Raf1Star|RKIP + RKIP; k157*Raf1Star|RKIP|RKIP;
  r158: RP|ERKPP => Raf1Star|RKIP|ERKPP|ERKPP; k158*RP|ERKPP;
  r159: MEKPP|MEKPP|ERK => ERKPP|MEKPP|ERK; k159*MEKPP|MEKPP|ERK;
  r160: Raf1Star|Raf1Star|RKIP|ERKPP => RKIP|Raf1Star|RKIP|ERKPP; k160*Raf1Star|Raf1Star|RKIP|ERKPP;
  r161: RKIPP|MEKPP => ERK|MEKPP; k161*RKIPP|MEKPP;
  r162: RKIP|Raf1Star|RKIP => MEKPP|ERK|Raf1Star|RKIP; k162*RKIP|Raf1Star|RKIP;
  r163: RKIPP|Raf1Star|RKIP => MEKPP|ERK|Raf1Star|RKIP; k163*RKIPP|Raf1Star|RKIP;
  r164: MEKPP|ERK|Raf1Star => ERKPP|Raf1Star; k164*MEKPP|ERK|Raf1Star;
  r165: ERK|RKIPP => RP|RKIPP; k165*ERK|RKIPP;
  r166: ERKPP + Raf1Star|RKIP => ERKPP|Raf1Star|RKIP; k166*ERKPP*Raf1Star|RKIP;
  r167: Raf1Star|RKIP|Raf1Star => MEKPP|ERK|Raf1Star; k167*Raf1Star|RKIP|Raf1Star;
  r168: RP|RKIP => ERK|RKIP; k168*RP|RKIP;
  r169: Raf1Star|RKIP|ERKPP|RKIP => MEKPP|ERK|RKIP; k169*Raf1Star|RKIP|ERKPP|RKIP;
  r170: RKIPP|RP|RKIPP => Raf1Star|RKIP|RP|RKIPP; k170*RKIPP|RP|RKIPP;
  r171: ERKPP|Raf1Star|RKIP|ERKPP => RKIP|Raf1Star|RKIP|ERKPP; k171*ERKPP|Raf1Star|RKIP|ERKPP;
  r172: MEKPP|ERK|ERKPP => RKIP|ERKPP; k172*MEKPP|ERK|ERKPP;
  r173: RKIPP|MEKPP => RKIP|MEKPP; k173*RKIPP|MEKPP;
  r174: ERK|ERKPP => Raf1Star|RKIP|ERKPP; k174*ERK|ERKPP;
  r175: ERKPP|RKIPP => Raf1Star|RKIP|RKIPP; k175*ERKPP|RKIPP;
  r176: RKIPP|MEKPP => MEKPP|ERK|MEKPP; k176*RKIPP|MEKPP;
  r177: RKIPP|MEKPP => Raf1Star|RKIP|MEKPP; k177*RKIPP|MEKPP;
  r178: RP|MEKPP => RP|RKIPP|MEKPP; k178*RP|MEKPP;
  r179: MEKPP|ERK|RP|RKIPP => ERKPP|RP|RKIPP; k179*MEKPP|ERK|RP|RKIPP;
  r180: RKIPP|RKIP => Raf1Star|RKIP|ERKPP|RKIP; k180*RKIPP|RKIP;
  r181: ERK|RKIPP => MEKPP|RKIPP; k181*ERK|RKIPP;
  r182: MEKPP|ERK|RKIP => RKIPP|RKIP; k182*MEKPP|ERK|RKIP;
  r183: MEKPP|ERK|RKIP => ERK|RKIP; k183*MEKPP|ERK|RKIP;
  r184: MEKPP|RP => RP|RKIPP|RP; k184*MEKPP|RP;
  r185: MEKPP|ERK|RP => Raf1Star|RP; k185*MEKPP|ERK|RP;
  r186: RP|MEKPP => Raf1Star|RKIP|ERKPP|MEKPP; k186*RP|MEKPP;
  r187: ERK + Raf1Star => ERK|Raf1Star; k187*ERK*Raf1Star;
  r188: Raf1Star|RKIP + MEKPP|ERK => Raf1Star|RKIP|MEKPP|ERK; k188*Raf1Star|RKIP*MEKPP|ERK;
  r189: Raf1Star|RKIPP => RP|RKIPP|RKIPP; k189*Raf1Star|RKIPP;
  r190: RKIP|RP|RKIPP => Raf1Star|RKIP|RP|RKIPP; k190*RKIP|RP|RKIPP;
  r191: Raf1Star|Raf1Star|RKIP => RP|Raf1Star|RKIP; k191*Raf1Star|Raf1Star|RKIP;
  r192: MEKPP|ERK|MEKPP => RP|MEKPP; k192*MEKPP|ERK|MEKPP;
  r193: MEKPP|ERK|ERKPP => ERK|ERKPP; k193*MEKPP|ERK|ERKPP;
  r194: ERKPP|RP|RKIPP => ERKPP + RP|RKIPP; k194*ERKPP|RP|RKIPP;
  r195: RKIPP|Raf1Star|RKIP|ERKPP => RKIPP + Raf1Star|RKIP|ERKPP; k195*RKIPP|Raf1Star|RKIP|ERKPP;
  r196: ERK|RKIP => MEKPP|ERK|RKIP; k196*ERK|RKIP;
  r197: Raf1Star|RKIP => RP|RKIP; k197*Raf1Star|RKIP;
  r198: RKIPP|RP => Raf1Star|RP; k198*RKIPP|RP;
  r199: RP|MEKPP|ERK => Raf1Star|RKIP|MEKPP|ERK; k199*RP|MEKPP|ERK;
  r200: RP|MEKPP => Raf1Star|RKIP|MEKPP; k200*RP|MEKPP;
  r201: RKIP|ERKPP => RP|RKIPP|ERKPP; k201*RKIP|ERKPP;
  r202: ERK + Raf1Star|RKIP => ERK|Raf1Star|RKIP; k202*ERK*Raf1Star|RKIP;
  r203: Raf1Star|RKIP|ERKPP|MEKPP => ERK|MEKPP; k203*Raf1Star|RKIP|ERKPP|MEKPP;
  r204: Raf1Star|RKIP|MEKPP|ERK => RP|RKIPP|MEKPP|ERK; k204*Raf1Star|RKIP|MEKPP|ERK;
  r205: Raf1Star|RKIP + ERK => Raf1Star|RKIP|ERK; k205*Raf1Star|RKIP*ERK;
  r206: Raf1Star|RKIP|ERKPP|RP => ERKPP|RP; k206*Raf1Star|RKIP|ERKPP|RP;
  r207: RP|RKIPP|RKIPP => RKIP|RKIPP; k207*RP|RKIPP|RKIPP;
  r208: MEKPP|RP => MEKPP + RP; k208*MEKPP|RP;
  r209: RP|ERK => RP + ERK; k209*RP|ERK;
  r210: RP|RKIPP|RP => MEKPP|RP; k210*RP|RKIPP|RP;
  r211: Raf1Star|RKIP|ERKPP|RP => ERK|RP; k211*Raf1Star|RKIP|ERKPP|RP;
  r212: Raf1Star|MEKPP|ERK => RP|MEKPP|ERK; k212*Raf1Star|MEKPP|ERK;
  r213: MEKPP|ERK|ERK => Raf1Star|RKIP|ERK; k213*MEKPP|ERK|ERK;
  r214: Raf1Star|RKIP => RKIPP|RKIP; k214*Raf1Star|RKIP;
  r215: Raf1Star|RKIP|ERKPP + ERK => Raf1Star|RKIP|ERKPP|ERK; k215*Raf1Star|RKIP|ERKPP*ERK;
  r216: Raf1Star|MEKPP|ERK => Raf1Star + MEKPP|ERK; k216*Raf1Star|MEKPP|ERK;
  r217: RP|RKIPP|RKIPP => Raf1Star|RKIPP; k217*RP|RKIPP|RKIPP;
  r218: RP|ERK => ERKPP|ERK; k218*RP|ERK;
  r219: MEKPP|ERK|Raf1Star|RKIP|ERKPP => RKIP|Raf1Star|RKIP|ERKPP; k219*MEKPP|ERK|Raf1Star|RKIP|ERKPP;
  r220: RKIPP|ERKPP => RKIPP + ERKPP; k220*RKIPP|ERKPP;
  r221: ERK|RP|RKIPP => Raf1Star|RKIP|RP|RKIPP; k221*ERK|RP|RKIPP;
  r222: ERKPP|RKIP => MEKPP|RKIP; k222*ERKPP|RKIP;
  r223: RKIP|Raf1Star|RKIP|ERKPP => RP|Raf1Star|RKIP|ERKPP; k223*RKIP|Raf1Star|RKIP|ERKPP;
  r224: ERKPP|Raf1Star|RKIP => Raf1Star|RKIP|ERKPP|Raf1Star|RKIP; k224*ERKPP|Raf1Star|RKIP;
  r225: RP|RP|RKIPP => MEKPP|ERK|RP|RKIPP; k225*RP|RP|RKIPP;
  r226: RKIPP|Raf1Star|RKIP|ERKPP => RKIP|Raf1Star|RKIP|ERKPP; k226*RKIPP|Raf1Star|RKIP|ERKPP;
  r227: Raf1Star|RKIP|RP|RKIPP => ERK|RP|RKIPP; k227*Raf1Star|RKIP|RP|RKIPP;
  r228: ERKPP|MEKPP => Raf1Star|RKIP|MEKPP; k228*ERKPP|MEKPP;
  r229: RKIP + MEKPP => RKIP|MEKPP; k229*RKIP*MEKPP;
  r230: MEKPP|Raf1Star => RKIPP|Raf1Star; k230*MEKPP|Raf1Star;
  r231: RP|Raf1Star => MEKPP|ERK|Raf1Star; k231*RP|Raf1Star;
  r232: RKIPP|RP => RKIP|RP; k232*RKIPP|RP;
  r233: ERKPP|MEKPP => Raf1Star|RKIP|ERKPP|MEKPP; k233*ERKPP|MEKPP;
  r234: MEKPP|ERK|MEKPP => ERK|MEKPP; k234*MEKPP|ERK|MEKPP;
  r235: RP|RKIPP + RP => RP|RKIPP|RP; k235*RP|RKIPP*RP;
  r236: Raf1Star|RKIP|ERKPP|ERK => Raf1Star|ERK; k236*Raf1Star|RKIP|ERKPP|ERK;
  r237: ERKPP|RKIPP => RP|RKIPP; k237*ERKPP|RKIPP;
  r238: Raf1Star|RKIP|RP => ERK|RP; k238*Raf1Star|RKIP|RP;
  r239: MEKPP|ERK|MEKPP => Raf1Star|MEKPP; k239*MEKPP|ERK|MEKPP;
  r240: MEKPP|ERK|RKIPP => RP|RKIPP|RKIPP; k240*MEKPP|ERK|RKIPP;
  r241: Raf1Star|RKIP|ERKPP + RKIPP => Raf1Star|RKIP|ERKPP|RKIPP; k241*Raf1Star|RKIP|ERKPP*RKIPP;
  r242: RP|RKIPP|Raf1Star|RKIP => RP|Raf1Star|RKIP; k242*RP|RKIPP|Raf1Star|RKIP;
  r243: RKIP|MEKPP => RKIP + MEKPP; k243*RKIP|MEKPP;
  r244: MEKPP|ERK => MEKPP + ERK; k244*MEKPP|ERK;
  r245: ERK + MEKPP|ERK => ERK|MEKPP|ERK; k245*ERK*MEKPP|ERK;
  r246: RP|RKIPP|RKIPP => ERKPP|RKIPP; k246*RP|RKIPP|RKIPP;
  r247: RKIPP|RKIP => ERKPP|RKIP; k247*RKIPP|RKIP;
  r248: ERKPP + MEKPP|ERK => ERKPP|MEKPP|ERK; k248*ERKPP*MEKPP|ERK;
  r249: Raf1Star|RKIP|ERKPP|RKIPP => Raf1Star|RKIP|RKIPP; k249*Raf1Star|RKIP|ERKPP|RKIPP;
  r250: Raf1Star|RKIP|Raf1Star|RKIP|ERKPP => RKIP|Raf1Star|RKIP|ERKPP; k250*Raf1Star|RKIP|Raf1Star|RKIP|ERKPP;
  r251: RP|ERK => Raf1Star|ERK; k251*RP|ERK;
  r252: MEKPP|ERK + ERKPP => MEKPP|ERK|ERKPP; k252*MEKPP|ERK*ERKPP;
  r253: Raf1Star|ERK => Raf1Star + ERK; k253*Raf1Star|ERK;
  r254: RP|RKIPP|RKIP => MEKPP|ERK|RKIP; k254*RP|RKIPP|RKIP;
  r255: ERKPP|MEKPP => Raf1Star|MEKPP; k255*ERKPP|MEKPP;
  r256: RP + RKIP => RP|RKIP; k256*RP*RKIP;
  r257: ERK|RP => Raf1Star|RP; k257*ERK|RP;
  r258: RP|RKIPP => Raf1Star|RKIPP; k258*RP|RKIPP;
  r259: MEKPP|ERK|Raf1Star|RKIP|ERKPP => ERK|Raf1Star|RKIP|ERKPP; k259*MEKPP|ERK|Raf1Star|RKIP|ERKPP;
  r260: RP|RKIPP|RKIP => RP|RKIPP + RKIP; k260*RP|RKIPP|RKIP;
  r261: RP|RKIPP + RKIP => RP|RKIPP|RKIP; k261*RP|RKIPP*RKIP;
  r262: Raf1Star|RKIP|ERK => RP|ERK; k262*Raf1Star|RKIP|ERK;
  r263: ERKPP|Raf1Star|RKIP|ERKPP => RP|RKIPP|Raf1Star|RKIP|ERKPP; k263*ERKPP|Raf1Star|RKIP|ERKPP;
  r264: RKIPP|ERKPP => RKIP|ERKPP; k264*RKIPP|ERKPP;
  r265: Raf1Star|RKIP|ERKPP|ERK => Raf1Star|RKIP|ERK; k265*Raf1Star|RKIP|ERKPP|ERK;
  r266: RP|RKIPP|RKIPP => ERK|RKIPP; k266*RP|RKIPP|RKIPP;
  r267: RP|Raf1Star|RKIP|ERKPP => ERKPP|Raf1Star|RKIP|ERKPP; k267*RP|Raf1Star|RKIP|ERKPP;
  r268: RKIPP|MEKPP|ERK => Raf1Star|MEKPP|ERK; k268*RKIPP|MEKPP|ERK;
  r269: MEKPP|RKIP => MEKPP + RKIP; k269*MEKPP|RKIP;
  r270: Raf1Star|RKIP => MEKPP|ERK|RKIP; k270*Raf1Star|RKIP;
  r271: Raf1Star|Raf1Star|RKIP => RP|RKIPP|Raf1Star|RKIP; k271*Raf1Star|Raf1Star|RKIP;
  r272: Raf1Star|ERKPP => Raf1Star|RKIP|ERKPP; k272*Raf1Star|ERKPP;
  r273: RKIP|RKIPP => RP|RKIPP|RKIPP; k273*RKIP|RKIPP;
  r274: Raf1Star|RKIP + RKIPP => Raf1Star|RKIP|RKIPP; k274*Raf1Star|RKIP*RKIPP;
  r275: RKIP|Raf1Star|RKIP|ERKPP => ERK|Raf1Star|RKIP|ERKPP; k275*RKIP|Raf1Star|RKIP|ERKPP;
  r276: Raf1Star|RKIP|ERKPP|ERKPP => RKIP|ERKPP; k276*Raf1Star|RKIP|ERKPP|ERKPP;
  r277: Raf1Star|RKIP|ERKPP|Raf1Star|RKIP => RP|RKIPP|Raf1Star|RKIP; k277*Raf1Star|RKIP|ERKPP|Raf1Star|RKIP;
  r278: ERKPP|RP|RKIPP => Raf1Star|RKIP|RP|RKIPP; k278*ERKPP|RP|RKIPP;
  r279: RP|RKIPP|ERK => MEKPP|ERK; k279*RP|RKIPP|ERK;
  r280: Raf1Star + ERKPP => Raf1Star|ERKPP; k280*Raf1Star*ERKPP;
  r281: RKIPP|MEKPP|ERK => Raf1Star|RKIP|MEKPP|ERK; k281*RKIPP|MEKPP|ERK;
  r282: MEKPP|ERK|RP => Raf1Star|RKIP|ERKPP|RP; k282*MEKPP|ERK|RP;
  r283: MEKPP|ERK|Raf1Star => Raf1Star|RKIP|ERKPP|Raf1Star; k283*MEKPP|ERK|Raf1Star;
  r284: RP|RKIPP|MEKPP|ERK => ERKPP|MEKPP|ERK; k284*RP|RKIPP|MEKPP|ERK;
  r285: Raf1Star|RKIP|ERKPP => RP|ERKPP; k285*Raf1Star|RKIP|ERKPP;
  r286: ERK|RP => Raf1Star|RKIP|RP; k286*ERK|RP;
  r287: RP|MEKPP|ERK => RKIP|MEKPP|ERK; k287*RP|MEKPP|ERK;
  r288: Raf1Star|RKIP|ERKPP|ERKPP => RKIPP|ERKPP; k288*Raf1Star|RKIP|ERKPP|ERKPP;
  r289: RKIP|Raf1Star|RKIP => RP|RKIPP|Raf1Star|RKIP; k289*RKIP|Raf1Star|RKIP;
  r290: ERK|Raf1Star|RKIP|ERKPP => RP|RKIPP|Raf1Star|RKIP|ERKPP; k290*ERK|Raf1Star|RKIP|ERKPP;
  r291: RP|RKIPP|RP => RKIPP|RP; k291*RP|RKIPP|RP;
  r292: RP|RKIPP|Raf1Star => MEKPP|Raf1Star; k292*RP|RKIPP|Raf1Star;
  r293: Raf1Star|RP|RKIPP => ERK|RP|RKIPP; k293*Raf1Star|RP|RKIPP;
  r294: ERK|RKIP => RP|RKIPP|RKIP; k294*ERK|RKIP;
  r295: MEKPP|MEKPP|ERK => RKIPP|MEKPP|ERK; k295*MEKPP|MEKPP|ERK;
  r296: ERKPP|ERK => Raf1Star|ERK; k296*ERKPP|ERK;
  r297: Raf1Star + Raf1Star|RKIP => Raf1Star|Raf1Star|RKIP; k297*Raf1Star*Raf1Star|RKIP;
  r298: MEKPP|ERKPP => MEKPP + ERKPP; k298*MEKPP|ERKPP;
  r299: ERKPP|RKIP => Raf1Star|RKIP|RKIP; k299*ERKPP|RKIP;
  r300: RKIP|ERKPP => Raf1Star|RKIP|ERKPP|ERKPP; k300*RKIP|ERKPP;
  r301: ERKPP|RP|RKIPP => Raf1Star|RKIP|ERKPP|RP|RKIPP; k301*ERKPP|RP|RKIPP;
  r302: RP|RKIPP|MEKPP|ERK => Raf1Star|RKIP|ERKPP|MEKPP|ERK; k302*RP|RKIPP|MEKPP|ERK;
  r303: RKIPP|Raf1Star|RKIP|ERKPP => MEKPP|ERK|Raf1Star|RKIP|ERKPP; k303*RKIPP|Raf1Star|RKIP|ERKPP;
  r304: ERKPP|MEKPP|ERK => ERKPP + MEKPP|ERK; k304*ERKPP|MEKPP|ERK;
  r305: MEKPP|Raf1Star|RKIP => MEKPP|ERK|Raf1Star|RKIP; k305*MEKPP|Raf1Star|RKIP;
  r306: Raf1Star|RKIP => RP|RKIPP|RKIP; k306*Raf1Star|RKIP;
  r307: ERKPP|RP|RKIPP => RP|RP|RKIPP; k307*ERKPP|RP|RKIPP;
  r308: RKIP|ERK => MEKPP|ERK|ERK; k308*RKIP|ERK;
  r309: ERKPP|Raf1Star|RKIP => RP|Raf1Star|RKIP; k309*ERKPP|Raf1Star|RKIP;
  r310: MEKPP|Raf1Star => MEKPP|ERK|Raf1Star; k310*MEKPP|Raf1Star;
  r311: Raf1Star + RKIPP => Raf1Star|RKIPP; k311*Raf1Star*RKIPP;
  r312: ERK|RKIPP => Raf1Star|RKIPP; k312*ERK|RKIPP;
  r313: RP|MEKPP|ERK => MEKPP|MEKPP|ERK; k313*RP|MEKPP|ERK;
  r314: Raf1Star|RKIP|ERKPP|Raf1Star => Raf1Star|RKIP|ERKPP + Raf1Star; k314*Raf1Star|RKIP|ERKPP|Raf1Star;
  r315: MEKPP + ERKPP => MEKPP|ERKPP; k315*MEKPP*ERKPP;
  r316: RP|RKIPP + Raf1Star|RKIP|ERKPP => RP|RKIPP|Raf1Star|RKIP|ERKPP; k316*RP|RKIPP*Raf1Star|RKIP|ERKPP;
  r317: ERK|RP|RKIPP => MEKPP|RP|RKIPP; k317*ERK|RP|RKIPP;
  r318: Raf1Star|RKIP|RP|RKIPP => ERKPP|RP|RKIPP; k318*Raf1Star|RKIP|RP|RKIPP;
  r319: RKIP|ERKPP => Raf1Star|RKIP|ERKPP; k319*RKIP|ERKPP;
  r320: Raf1Star|RKIP|Raf1Star|RKIP|ERKPP => ERKPP|Raf1Star|RKIP|ERKPP; k320*Raf1Star|RKIP|Raf1Star|RKIP|ERKPP;
  r321: ERKPP|ERK => MEKPP|ERK; k321*ERKPP|ERK;
  r322: ERKPP|MEKPP|ERK => RKIPP|MEKPP|ERK; k322*ERKPP|MEKPP|ERK;
  r323: Raf1Star|RP|RKIPP => RKIPP|RP|RKIPP; k323*Raf1Star|RP|RKIPP;
  r324: Raf1Star|RKIP|MEKPP|ERK => MEKPP|MEKPP|ERK; k324*Raf1Star|RKIP|MEKPP|ERK;
  r325: RP|Raf1Star|RKIP|ERKPP => Raf1Star|RKIP|Raf1Star|RKIP|ERKPP; k325*RP|Raf1Star|RKIP|ERKPP;
  r326: Raf1Star|RKIP|RKIP => RP|RKIP; k326*Raf1Star|RKIP|RKIP;
  r327: RKIPP|MEKPP => RP|RKIPP|MEKPP; k327*RKIPP|MEKPP;
  r328: RP|RKIPP|Raf1Star|RKIP|ERKPP => Raf1Star|Raf1Star|RKIP|ERKPP; k328*RP|RKIPP|Raf1Star|RKIP|ERKPP;
  r329: MEKPP|ERK|ERK => MEKPP|ERK + ERK; k329*MEKPP|ERK|ERK;
  r330: ERKPP|RKIP => RKIPP|RKIP; k330*ERKPP|RKIP;
  r331: RKIP + RP|RKIPP => RKIP|RP|RKIPP; k331*RKIP*RP|RKIPP;
  r332: MEKPP|ERKPP => RKIP|ERKPP; k332*MEKPP|ERKPP;
  r333: MEKPP|ERK|RKIP => Raf1Star|RKIP|ERKPP|RKIP; k333*MEKPP|ERK|RKIP;
  r334: MEKPP|RP => Raf1Star|RKIP|RP; k334*MEKPP|RP;
  r335: RKIPP|Raf1Star|RKIP|ERKPP => Raf1Star|RKIP|Raf1Star|RKIP|ERKPP; k335*RKIPP|Raf1Star|RKIP|ERKPP;
  r336: MEKPP|ERK => RKIPP|ERK; k336*MEKPP|ERK;
  r337: Raf1Star|RKIPP => ERK|RKIPP; k337*Raf1Star|RKIPP;
  r338: MEKPP|ERK|RP|RKIPP => RKIPP|RP|RKIPP; k338*MEKPP|ERK|RP|RKIPP;
  r339: RKIPP + Raf1Star => RKIPP|Raf1Star; k339*RKIPP*Raf1Star;
  r340: RKIPP|ERK => MEKPP|ERK|ERK; k340*RKIPP|ERK;
  r341: Raf1Star|RKIP + MEKPP => Raf1Star|RKIP|MEKPP; k341*Raf1Star|RKIP*MEKPP;
  r342: Raf1Star|RKIP|RKIP => MEKPP|RKIP; k342*Raf1Star|RKIP|RKIP;
  r343: MEKPP|RP|RKIPP => Raf1Star|RKIP|ERKPP|RP|RKIPP; k343*MEKPP|RP|RKIPP;
  r344: Raf1Star|RKIP|ERKPP|Raf1Star => RP|RKIPP|Raf1Star; k344*Raf1Star|RKIP|ERKPP|Raf1Star;
  r345: ERK|RP => RKIPP|RP; k345*ERK|RP;
  r346: MEKPP|ERK|MEKPP => ERKPP|MEKPP; k346*MEKPP|ERK|MEKPP;
  r347: RKIPP|Raf1Star|RKIP|ERKPP => MEKPP|Raf1Star|RKIP|ERKPP; k347*RKIPP|Raf1Star|RKIP|ERKPP;
  r348: Raf1Star|RKIP|ERKPP|ERKPP => Raf1Star|RKIP|ERKPP + ERKPP; k348*Raf1Star|RKIP|ERKPP|ERKPP;
  r349: Raf1Star|ERK => MEKPP|ERK; k349*Raf1Star|ERK;
  r350: RKIP|Raf1Star|RKIP => Raf1Star|RKIP|ERKPP|Raf1Star|RKIP; k350*RKIP|Raf1Star|RKIP;
  r351: Raf1Star|RKIP|RKIP => ERKPP|RKIP; k351*Raf1Star|RKIP|RKIP;
  r352: MEKPP|ERK|Raf1Star|RKIP => Raf1Star|RKIP|ERKPP|Raf1Star|RKIP; k352*MEKPP|ERK|Raf1Star|RKIP;
  r353: Raf1Star|RKIP|ERKPP|RP => RKIP|RP; k353*Raf1Star|RKIP|ERKPP|RP;
  r354: ERKPP|ERK => RP|RKIPP|ERK; k354*ERKPP|ERK;
  r355: MEKPP|Raf1Star|RKIP|ERKPP => MEKPP|ERK|Raf1Star|RKIP|ERKPP; k355*MEKPP|Raf1Star|RKIP|ERKPP;
  r356: MEKPP|ERK => RP|ERK; k356*MEKPP|ERK;
  r357: Raf1Star|RKIP|ERKPP|Raf1Star|RKIP => RKIPP|Raf1Star|RKIP; k357*Raf1Star|RKIP|ERKPP|Raf1Star|RKIP;
  r358: ERKPP|Raf1Star|RKIP|ERKPP => Raf1Star|RKIP|Raf1Star|RKIP|ERKPP; k358*ERKPP|Raf1Star|RKIP|ERKPP;
  r359: RKIPP|RP => ERK|RP; k359*RKIPP|RP;
  r360: RKIPP|RKIP => Raf1Star|RKIP; k360*RKIPP|RKIP;
  r361: Raf1Star|RKIP|ERKPP => MEKPP|ERKPP; k361*Raf1Star|RKIP|ERKPP;
  r362: Raf1Star|RKIP|ERKPP|RKIP => ERK|RKIP; k362*Raf1Star|RKIP|ERKPP|RKIP;
  r363: Raf1Star|RKIP|RKIPP => Raf1Star|RKIPP; k363*Raf1Star|RKIP|RKIPP;
  r364: Raf1Star|RKIP + ERKPP => Raf1Star|RKIP|ERKPP; k364*Raf1Star|RKIP*ERKPP;
  r365: RP|MEKPP => RKIP|MEKPP; k365*RP|MEKPP;
  r366: MEKPP|ERKPP => RP|ERKPP; k366*MEKPP|ERKPP;
  r367: Raf1Star|RKIP|MEKPP => Raf1Star|MEKPP; k367*Raf1Star|RKIP|MEKPP;
  r368: Raf1Star|RKIP|ERKPP + Raf1Star|RKIP => Raf1Star|RKIP|ERKPP|Raf1Star|RKIP; k368*Raf1Star|RKIP|ERKPP*Raf1Star|RKIP;
  r369: Raf1Star|RKIP|RKIPP => ERKPP|RKIPP; k369*Raf1Star|RKIP|RKIPP;
  r370: Raf1Star|RKIP|ERKPP|RKIP => Raf1Star|RKIP; k370*Raf1Star|RKIP|ERKPP|RKIP;
  r371: MEKPP|ERK|ERKPP => Raf1Star|RKIP|ERKPP|ERKPP; k371*MEKPP|ERK|ERKPP;
  r372: ERKPP|MEKPP => ERKPP + MEKPP; k372*ERKPP|MEKPP;
  r373: Raf1Star|RKIP|ERKPP|RP => Raf1Star|RKIP|RP; k373*Raf1Star|RKIP|ERKPP|RP;
  r374: RP|RKIPP|Raf1Star|RKIP => MEKPP|Raf1Star|RKIP; k374*RP|RKIPP|Raf1Star|RKIP;
  r375: Raf1Star|RKIP|MEKPP|ERK => RKIPP|MEKPP|ERK; k375*Raf1Star|RKIP|MEKPP|ERK;
  r376: RP|ERKPP => RP + ERKPP; k376*RP|ERKPP;
  r377: ERK|Raf1Star|RKIP|ERKPP => ERKPP|Raf1Star|RKIP|ERKPP; k377*ERK|Raf1Star|RKIP|ERKPP;
  r378: ERKPP|Raf1Star => RP|RKIPP|Raf1Star; k378*ERKPP|Raf1Star;
  r379: ERKPP|RKIPP => ERK|RKIPP; k379*ERKPP|RKIPP;
  r380: Raf1Star|RKIP|ERKPP|RP => MEKPP|RP; k380*Raf1Star|RKIP|ERKPP|RP;
  r381: Raf1Star|RP|RKIPP => Raf1Star|RKIP|RP|RKIPP; k381*Raf1Star|RP|RKIPP;
  r382: ERK|Raf1Star|RKIP|ERKPP => RP|Raf1Star|RKIP|ERKPP; k382*ERK|Raf1Star|RKIP|ERKPP;
  r383: ERKPP|Raf1Star|RKIP => ERKPP + Raf1Star|RKIP; k383*ERKPP|Raf1Star|RKIP;
  r384: RKIPP|Raf1Star|RKIP|ERKPP => ERK|Raf1Star|RKIP|ERKPP; k384*RKIPP|Raf1Star|RKIP|ERKPP;
  r385: Raf1Star|ERKPP => RKIPP|ERKPP; k385*Raf1Star|ERKPP;
  r386: RKIPP|ERKPP => Raf1Star|RKIP|ERKPP; k386*RKIPP|ERKPP;
  r387: RP|RKIPP + Raf1Star => RP|RKIPP|Raf1Star; k387*RP|RKIPP*Raf1Star;
  r388: Raf1Star|RKIP|ERKPP|Raf1Star => ERK|Raf1Star; k388*Raf1Star|RKIP|ERKPP|Raf1Star;
end
